// COMSOL Multiphysics 5.6.0.280 model "metamaterials_2D_eigenvalues_00.mph"
// Outline of the model tree

Parameters
  l1 = 3[cm]  // length x direction
  l2 = 3[cm]  // length y direction
  h1 = 2[cm]  // thickness x direction
  h2 = 2[cm]  // thickness y direction
  h3 = .1[cm]  // thickness z direction
  E0 = 10[MPa]  // Young modulus
  nu0 = 1/6  // Poisson ratio
  rho0 = 1500  // Mass density
  kfx = 2*pi/l1
  kfy = pi/l2

Geometry
  geom1 "Geometry 1" (2D, length unit m)
    r1: Rectangle | base = center; size = {l1, h1}
    r2: Rectangle | rot = 90; base = center; size = {l2, h2}
    fin: Finalize "Form Union"

Materials
  mat1: Common "Material 1" on all domains
    def "Basic"
      youngsmodulus = E0
      poissonsratio = nu0
      density = rho0

Physics
  solid: SolidMechanics on all domains
    dependent variable u = {u, v, w}
    d.d = h3
    lemm1: LinearElasticModel "Linear Elastic Material 1" (default)
    free1: Free (default)
    init1: init "Initial Values 1" (default)
    pc1: PeriodicCondition on boundaries 1, 16
      PeriodicType = Floquet
      kFloquet = {kfx, kfy, 0}
      destinationDomains: boundaries 16
    pc2: PeriodicCondition on boundaries 5, 10
      PeriodicType = Floquet
      kFloquet = {kfx, kfy, 0}
      destinationDomains: boundaries 10

Mesh
  mesh1 "Mesh 1" (physics-controlled)

Studies
  std1 "Study 1"
    eigv: Eigenvalue

Solver configurations
  sol1 "Solution 1" (study std1)
    v1: Variables "Dependent Variables 1"
    e1: Eigenvalue "Eigenvalue Solver 1"
      dDef: Direct

Datasets
  dset1: Solution | solution = sol1
  arr1: Array2D | data = dset1; fullsize = {5, 5}

Plots
  pg1: PlotGroup2D "Stress (solid)" | data = arr1
    surf1: Surface | expr = solid.mises
      def: Deform "Deformation" | expr = {u, v}; descr = Displacement field

Exports
  data1: Data | data = arr1